// SBML level 3 version 1

function MM(km, Vmax, S)
  Vmax*S/(km + S);
end

function MMWithKcat(km, kcat, S, E)
  kcat*E*S/(km + S);
end

function NonCompetitiveInhibition(km, ki, Vmax, n, I, S)
  Vmax*S/((km + S)*(1 + (I/ki)^n));
end

function NonCompetitiveInhibitionWithKcat(km, ki, kcat, E, n, I, S)
  kcat*E*S/((km + S)*(1 + (I/ki)^n));
end

function NonCompetitiveInhibitionWithKcatAndExtraActivator(km, ki, kcat, E1, E2, n, I, S)
  kcat*E1*E2*S/((km + S)*(1 + (I/ki)^n));
end

function MA1(k, S)
  k*S;
end

function MA2(k, S1, S2)
  k*S1*S2;
end

function MA1Mod(k, S, M)
  k*S*M;
end

function MA2Mod(k, S1, S2, M)
  k*S1*S2*M;
end

function CompetitiveInhibitionWithKcat(km, ki, kcat, E, I, S)
  kcat*E*S/(km + S + km*I/ki);
end

function CompetitiveInhibition(Vmax, km, ki, I, S)
  Vmax*S/(km + S + km*I/ki);
end

model Problem2()

  // Compartments:
  compartment default_compartment = 1;

  // Species:
  species N in default_compartment = 50;
  species pN in default_compartment = 0;
  species pD in default_compartment = 0;
  species G in default_compartment = 50;
  species pG in default_compartment = 0;
  species IG in default_compartment = 0;
  species K in default_compartment = 50;
  species pK in default_compartment = 0;
  species D in default_compartment = 50;
  species DI in default_compartment = 0;

  // Parameters:
  kNPhos = 0.1;
  S = 0;
  kNDephos = 0.05;
  kGPhos = 0.001;
  kGDephos = 0.1;
  kGBindI1 = 10;
  I1 = 0;
  kGUnbindI1 = 0.01;
  kKPhos = 0.0005;
  kKDephos = 0.001;
  kDPhos = 0.001;
  kDDephos = 0.1;
  kDBindI2 = 10;
  I2 = 0;
  kDUnbindI2 = 0.01;

  // Reactions:
  R1f: N -> pN; kNPhos*N*S;
  R1b: pN -> N; kNDephos*pN*pD;  // modifiers: pD
  R4f1: G -> pG; kGPhos*G*pN;  // modifiers: pN
  R4b: pG -> G; kGDephos*pG;
  R6f: G -> IG; kGBindI1*G*I1;
  R6b: IG -> G; kGUnbindI1*IG;
  R7f: K -> pK; kKPhos*K*pG*pN;  // modifiers: pN, pG
  R7b: pK -> K; kKDephos*pK;
  R8f: D -> pD; kDPhos*D*pK;  // modifiers: pK
  R8b: pD -> D; kDDephos*pD*K;  // modifiers: K
  R9f: D -> DI; kDBindI2*D*I2;
  R9b: DI -> D; kDUnbindI2*DI;
end
